A == □
[
    a[11], a[12], ..., a[1*k], 0, ..., 0;
    a[21], a[22], ..., ..., ..., ...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;
    ..., ..., ..., ..., ..., ..., 0;
    a[k1], ..., ..., ..., ..., ..., a[kn];
    0, ..., ..., ..., ..., ...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;
    ..., ..., ..., ..., ..., a[n - 1, n - 1], a[n - 1, n];
    0, ..., 0, a[nk], ..., a[n, n - 1], a[nn]
]
sum(1 + sum(2, j = 1 .. i - 1), i = 1 .. n) → n*(n + 1) - n
n^2
n^2 + (n^3 - n)/3 + 2*n^2 + 2*n → n^3/3 + 3*n^2 + 5*n/3
4*n^2 + 2*n - 1
n^3 + 3*n^2 + 2*n - 1
L == □
U == □
[
    0, ..., ..., ..., 0;
    0, ..., ..., 0, a[21];
    0, ..., 0, a[31], a[32];
    ..., ..., ..., ...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;
    a[k1], ..., ..., ..., a[k, k - 1];
    ..., ..., ..., ...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;
    a[nk], ..., ..., ..., a[n, n - 1]
]
[
    0, ..., ..., ..., 0;
    0, ..., ..., 0, a[12];
    0, ..., 0, a[13], a[23];
    ..., ..., ..., ...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;
    a[1*k], ..., ..., ..., a[k - 1, k];
    ..., ..., ..., ...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;
    a[kn], ..., ..., ..., a[n - 1, n]
]
sum(sum(3 + sum(4, k = 1 .. j - 1), j = 1 .. i - 1), i = 1 .. n) → n + n*(n + 1)*(4*n - 7)/6
n*(n - 1)*(4*n + 1)/6
2*n^3/3 - n^2/2 - n/6
